// SBML level 3 version 1

model CICRspineDend()
  // model units - substance: substance, time: time, volume: volume, area: area, length: length, extent: substance

  // Compartments:
  compartment kinetics_443_0_ = 3.1115e-15 volume;
  compartment compartment_1_532_0_ = 3.9e-16 volume;
  compartment compartment_2_534_0_ = 1e-16 volume;

  // Species:
  species phase_450_0_ in kinetics_443_0_ = 0.1;
  species CaIP3_3_R_452_0_ in kinetics_443_0_ = 0;
  species Serca_454_0_ in kinetics_443_0_ = 0.001999946;
  species CaM_458_0_ in kinetics_443_0_ = 0;
  species CaMCa_460_0_ in kinetics_443_0_ = 0;
  species CaMCa2_462_0_ in kinetics_443_0_ = 0;
  species CaMCa3_464_0_ in kinetics_443_0_ = 0;
  species CaMCa4_466_0_ in kinetics_443_0_ = 0;
  species IP3_R_468_0_ in kinetics_443_0_ = 0.0001;
  species IP3_3_R_470_0_ in kinetics_443_0_ = 0;
  species $IP3_472_0_ in kinetics_443_0_ = 0.0001;
  species Ca2_IP3_3_R_474_0_ in kinetics_443_0_ = 0;
  species Mirror_CaIP3_3_R_476_0_ in kinetics_443_0_;
  species ActIP3R_478_0_ in kinetics_443_0_ = 0;
  species basal_482_0_ in kinetics_443_0_ = 0;
  species $BufPool_484_0_ in kinetics_443_0_ = 0;
  species CaER_506_0_ in compartment_1_532_0_ = 0.408594;
  species leakPool_508_0_ in compartment_1_532_0_ = 0.001;
  species Ca_512_0_ in kinetics_443_0_ = 7.999893e-5;
  species Ca_516_0_ in compartment_2_534_0_ = 8e-5;
  species $CaExtracell_518_0_ in kinetics_443_0_ = 7.999893e-5;

  // Assignment rules:
  Mirror_CaIP3_3_R_476_0_ := CaIP3_3_R_452_0_;

  // Reactions:
  // kinetics_443_0_ * ( Permeability) * ActIP3R_478_0_ * (CaER_506_0_ - Ca_512_0_)
  chan_480_0_: CaER_506_0_ -> Ca_512_0_; kinetics_443_0_*chan_480_0__Permeability*ActIP3R_478_0_*(CaER_506_0_ - Ca_512_0_);  // modifiers: ActIP3R_478_0_
    chan_480_0__Permeability = 8000 litre_per_mmole_per_second;
  // compartment_1_532_0_ * ( Permeability) * leakPool_508_0_ * (CaER_506_0_ - Ca_512_0_)
  leakChan_510_0_: CaER_506_0_ -> Ca_512_0_; compartment_1_532_0_*leakChan_510_0__Permeability*leakPool_508_0_*(CaER_506_0_ - Ca_512_0_);  // modifiers: leakPool_508_0_
    leakChan_510_0__Permeability = 40 litre_per_mmole_per_second;
  // kinetics_443_0_ * CaMreac1_486_0__Kf * CaM_458_0_*Ca_512_0_-kinetics_443_0_ * CaMreac1_486_0__Kb * CaMCa_460_0_
  CaMreac1_486_0_: CaM_458_0_ + Ca_512_0_ -> CaMCa_460_0_; kinetics_443_0_*CaMreac1_486_0__Kf*CaM_458_0_*Ca_512_0_ - kinetics_443_0_*CaMreac1_486_0__Kb*CaMCa_460_0_;
    CaMreac1_486_0__Kf = 8484.87381 litre_per_mmole_per_second; CaMreac1_486_0__Kb = 8.4853 per_second;
  // kinetics_443_0_ * CaMreac2_488_0__Kf * CaMCa_460_0_*Ca_512_0_-kinetics_443_0_ * CaMreac2_488_0__Kb * CaMCa2_462_0_
  CaMreac2_488_0_: CaMCa_460_0_ + Ca_512_0_ -> CaMCa2_462_0_; kinetics_443_0_*CaMreac2_488_0__Kf*CaMCa_460_0_*Ca_512_0_ - kinetics_443_0_*CaMreac2_488_0__Kb*CaMCa2_462_0_;
    CaMreac2_488_0__Kf = 8484.87381 litre_per_mmole_per_second; CaMreac2_488_0__Kb = 8.4853 per_second;
  // kinetics_443_0_ * CaMreac3_490_0__Kf * CaMCa2_462_0_*Ca_512_0_-kinetics_443_0_ * CaMreac3_490_0__Kb * CaMCa3_464_0_
  CaMreac3_490_0_: CaMCa2_462_0_ + Ca_512_0_ -> CaMCa3_464_0_; kinetics_443_0_*CaMreac3_490_0__Kf*CaMCa2_462_0_*Ca_512_0_ - kinetics_443_0_*CaMreac3_490_0__Kb*CaMCa3_464_0_;
    CaMreac3_490_0__Kf = 3600.12996 litre_per_mmole_per_second; CaMreac3_490_0__Kb = 10 per_second;
  // kinetics_443_0_ * CaMreac4_492_0__Kf * CaMCa3_464_0_*Ca_512_0_-kinetics_443_0_ * CaMreac4_492_0__Kb * CaMCa4_466_0_
  CaMreac4_492_0_: CaMCa3_464_0_ + Ca_512_0_ -> CaMCa4_466_0_; kinetics_443_0_*CaMreac4_492_0__Kf*CaMCa3_464_0_*Ca_512_0_ - kinetics_443_0_*CaMreac4_492_0__Kb*CaMCa4_466_0_;
    CaMreac4_492_0__Kf = 1800.046 litre_per_mmole_per_second; CaMreac4_492_0__Kb = 10 per_second;
  // kinetics_443_0_ * Reac_494_0__Kf * IP3_R_468_0_*IP3_472_0_-kinetics_443_0_ * Reac_494_0__Kb * IP3_3_R_470_0_
  Reac_494_0_: IP3_R_468_0_ + $IP3_472_0_ -> IP3_3_R_470_0_; kinetics_443_0_*Reac_494_0__Kf*IP3_R_468_0_*IP3_472_0_ - kinetics_443_0_*Reac_494_0__Kb*IP3_3_R_470_0_;
    Reac_494_0__Kf = 12000.25 litre_per_mmole_per_second; Reac_494_0__Kb = 8 per_second;
  // kinetics_443_0_ * Reac2_496_0__Kf * IP3_3_R_470_0_*Ca_512_0_-kinetics_443_0_ * Reac2_496_0__Kb * CaIP3_3_R_452_0_
  Reac2_496_0_: IP3_3_R_470_0_ + Ca_512_0_ -> CaIP3_3_R_452_0_; kinetics_443_0_*Reac2_496_0__Kf*IP3_3_R_470_0_*Ca_512_0_ - kinetics_443_0_*Reac2_496_0__Kb*CaIP3_3_R_452_0_;
    Reac2_496_0__Kf = 15000.17 litre_per_mmole_per_second; Reac2_496_0__Kb = 1.65 per_second;
  // kinetics_443_0_ * Reac4_498_0__Kf * CaIP3_3_R_452_0_*Ca_512_0_-kinetics_443_0_ * Reac4_498_0__Kb * Ca2_IP3_3_R_474_0_
  Reac4_498_0_: CaIP3_3_R_452_0_ + Ca_512_0_ -> Ca2_IP3_3_R_474_0_; kinetics_443_0_*Reac4_498_0__Kf*CaIP3_3_R_452_0_*Ca_512_0_ - kinetics_443_0_*Reac4_498_0__Kb*Ca2_IP3_3_R_474_0_;
    Reac4_498_0__Kf = 1800.102 litre_per_mmole_per_second; Reac4_498_0__Kb = 0.21 per_second;
  // kinetics_443_0_ * Reac1_500_0__Kf * Mirror_CaIP3_3_R_476_0_^3-kinetics_443_0_ * Reac1_500_0__Kb * ActIP3R_478_0_
  Reac1_500_0_: 3 Mirror_CaIP3_3_R_476_0_ -> ActIP3R_478_0_; kinetics_443_0_*Reac1_500_0__Kf*Mirror_CaIP3_3_R_476_0_^3 - kinetics_443_0_*Reac1_500_0__Kb*ActIP3R_478_0_;
    Reac1_500_0__Kf = 5.200091e8 sq_litre_per_mmole_sq_per_second; Reac1_500_0__Kb = 5 per_second;
  // kinetics_443_0_ * Ca_regn_520_0__Kf * Ca_512_0_-kinetics_443_0_ * Ca_regn_520_0__Kb * CaExtracell_518_0_
  Ca_regn_520_0_: Ca_512_0_ -> $CaExtracell_518_0_; kinetics_443_0_*Ca_regn_520_0__Kf*Ca_512_0_ - kinetics_443_0_*Ca_regn_520_0__Kb*CaExtracell_518_0_;
    Ca_regn_520_0__Kf = 0.1 per_second; Ca_regn_520_0__Kb = 0.1 per_second;
  // kinetics_443_0_ * ( kcat * Ca_512_0_ * Serca_454_0_/(Km + Ca_512_0_))
  MMenz_SERCA_456_0_: Ca_512_0_ -> CaER_506_0_; kinetics_443_0_*(kcat*Ca_512_0_*Serca_454_0_/(Km + Ca_512_0_));  // modifiers: Serca_454_0_
    Km = 0.0001499993 mmole_per_litre; kcat = 8 per_second;

  // Unit definitions:
  unit volume = litre;
  unit substance = 1e-3 mole;
  unit length = metre;
  unit area = metre^2;
  unit time = second;
  unit litre_per_mmole_per_second = litre / (1e-3 mole * second);
  unit per_second = 1 / second;
  unit sq_litre_per_mmole_sq_per_second = litre^2 / ((1e-3 mole)^2 * second);
  unit mmole_per_litre = 1e-3 mole / litre;
end
