// SBML level 3 version 1

model chanPhosph3compt()
  // model units - substance: substance, time: time, volume: volume, area: area, length: length, extent: substance

  // Compartments:
  compartment kinetics_914_0_ = 1e-15 volume;
  compartment compartment_1_959_0_ = 1e-16 volume;
  compartment compartment_2_961_0_ = 1e-17 volume;

  // Species:
  species Ca_CaM_CaMKII_923_0_ in compartment_2_961_0_ = 0;
  species kinase_cplx_926_0_ in compartment_2_961_0_ = 0;
  species chan_928_0_ in compartment_2_961_0_ = 0.1;
  species chan_p_932_0_ in compartment_2_961_0_ = 0;
  species CaM_936_0_ in compartment_1_959_0_ = 0.01;
  species Ca_938_0_ in compartment_1_959_0_ = 8e-5;
  species Ca_CaM_940_0_ in compartment_1_959_0_ = 0;
  species CaMKII_944_0_ in compartment_1_959_0_ = 0.008333333;
  species Ca_950_0_ in kinetics_914_0_ = 8e-5;

  // Reactions:
  // compartment_2_961_0_ * dephosph_930_0__Kf * chan_p_932_0_
  dephosph_930_0_: chan_p_932_0_ => chan_928_0_; compartment_2_961_0_*dephosph_930_0__Kf*chan_p_932_0_;
    dephosph_930_0__Kf = 1 per_second;
  // compartment_1_959_0_ * Ca_bind_CaM_942_0__Kf * CaM_936_0_*Ca_938_0_^2-compartment_1_959_0_ * Ca_bind_CaM_942_0__Kb * Ca_CaM_940_0_
  // This should actually be 4th order in Ca. Using 2nd order here for simplicity and to lessen numerical stiffness.
  Ca_bind_CaM_942_0_: CaM_936_0_ + 2 Ca_938_0_ -> Ca_CaM_940_0_; compartment_1_959_0_*Ca_bind_CaM_942_0__Kf*CaM_936_0_*Ca_938_0_^2 - compartment_1_959_0_*Ca_bind_CaM_942_0__Kb*Ca_CaM_940_0_;
    Ca_bind_CaM_942_0__Kf = 10000080 sq_litre_per_mmole_sq_per_second; Ca_bind_CaM_942_0__Kb = 40 per_second;
  // compartment_1_959_0_ * CaM_bind_CaMKII_946_0__Kf * Ca_CaM_940_0_*CaMKII_944_0_-compartment_1_959_0_ * CaM_bind_CaMKII_946_0__Kb * Ca_CaM_CaMKII_923_0_
  CaM_bind_CaMKII_946_0_: Ca_CaM_940_0_ + CaMKII_944_0_ -> Ca_CaM_CaMKII_923_0_; compartment_1_959_0_*CaM_bind_CaMKII_946_0__Kf*Ca_CaM_940_0_*CaMKII_944_0_ - compartment_1_959_0_*CaM_bind_CaMKII_946_0__Kb*Ca_CaM_CaMKII_923_0_;
    CaM_bind_CaMKII_946_0__Kf = 100.002 litre_per_mmole_per_second; CaM_bind_CaMKII_946_0__Kb = 0.1 per_second;
  // compartment_2_961_0_ * ( k1 * Ca_CaM_CaMKII_923_0_*chan_928_0_ - k2 * kinase_cplx_926_0_ )
  kinase_925_0_Complex_formation_: Ca_CaM_CaMKII_923_0_ + chan_928_0_ -> kinase_cplx_926_0_; compartment_2_961_0_*(k1*Ca_CaM_CaMKII_923_0_*chan_928_0_ - k2*kinase_cplx_926_0_);
    k1 = 996.3432 litre_per_mmole_per_second; k2 = 8 per_second;
  // compartment_2_961_0_ * k3*kinase_cplx_926_0_
  kinase_925_0_Product_formation_: kinase_cplx_926_0_ => chan_p_932_0_ + Ca_CaM_CaMKII_923_0_; compartment_2_961_0_*k3*kinase_cplx_926_0_;
    k3 = 2 per_second;

  // Unit definitions:
  unit volume = litre;
  unit substance = 1e-3 mole;
  unit length = metre;
  unit area = metre^2;
  unit time = second;
  unit per_second = 1 / second;
  unit sq_litre_per_mmole_sq_per_second = litre^2 / ((1e-3 mole)^2 * second);
  unit litre_per_mmole_per_second = litre / (1e-3 mole * second);
end
